// SBML level 2 version 4

function Constant_flux_irreversible(v)
  v;
end
Constant_flux_irreversible is "Constant flux (irreversible)";

function vPH_Htot(kcatPH, Ptot, O2, KdPH, Htot, HP)
  Htot*kcatPH*Ptot*O2/(1 + O2)/(KdPH + Ptot + HP);
end

function vFH(Ftot, O2, alpha, H, KiFH, HF, KcatFH)
  H*KcatFH*Ftot*O2/(alpha + O2)/(KiFH + Ftot + HF);
end

function vFA(Ftot, O2, alpha, A, gamma, Atot, KiFA, KcatFH)
  A*KcatFH*Ftot*O2/(alpha + O2)/(KiFA + A + gamma*(Atot - A));
end

function vPH_H(H, kcatPH, Ptot, O2, KdPH, HP)
  H*kcatPH*Ptot*O2/(1 + O2)/(KdPH + Ptot + HP);
end

model Schmierer2010_FIH_Ankyrins()
  // This a model from the article:
  // Hypoxia-dependent sequestration of an oxygen sensor by a widespread structural motif can shape the hypoxic response - a predictive kinetic model
  // Bernhard Schmierer, Béla Novák1 and Christopher J Schofield BMC Systems Biology2010, 4:139 20955552,
  // Abstract:
  // Background
  // The activity of the heterodimeric transcription factor hypoxia inducible factor (HIF) is regulated by the post-translational, oxygen-dependent hydroxylation of its α-subunit by members of the prolyl hydroxylase domain (PHD or EGLN)-family and by factor inhibiting HIF (FIH). PHD-dependent hydroxylation targets HIFα for rapid proteasomal degradation; FIH-catalysed asparaginyl-hydroxylation of the C-terminal transactivation domain (CAD) of HIFα suppresses the CAD-dependent subset of the extensive transcriptional responses induced by HIF. FIH can also hydroxylate ankyrin-repeat domain (ARD) proteins, a large group of proteins which are functionally unrelated but share common structural features. Competition by ARD proteins for FIH is hypothesised to affect FIH activity towards HIFα; however the extent of this competition and its effect on the HIF-dependent hypoxic response are unknown.
  // Results
  // To analyse if and in which way the FIH/ARD protein interaction affects HIF-activity, we created a rate equation model. Our model predicts that an oxygen-regulated sequestration of FIH by ARD proteins significantly shapes the input/output characteristics of the HIF system. The FIH/ARD protein interaction is predicted to create an oxygen threshold for HIFα CAD-hydroxylation and to significantly sharpen the signal/response curves, which not only focuses HIFα CAD-hydroxylation into a defined range of oxygen tensions, but also makes the response ultrasensitive to varying oxygen tensions. Our model further suggests that the hydroxylation status of the ARD protein pool can encode the strength and the duration of a hypoxic episode, which may allow cells to memorise these features for a certain time period after reoxygenation.
  // Conclusions
  // The FIH/ARD protein interaction has the potential to contribute to oxygen-range finding, can sensitise the response to changes in oxygen levels, and can provide a memory of the strength and the duration of a hypoxic episode. These emergent properties are predicted to significantly shape the characteristics of HIF activity in animal cells. We argue that the FIH/ARD interaction should be taken into account in studies of the effect of pharmacological inhibition of the HIF-hydroxylases and propose that the interaction of a signalling sensor with a large group of proteins might be a general mechanism for the regulation of signalling pathways.
  // There are there models described in the paper. 1) Skeleton Model 1 (SKM1) - HIFα CAD-hydroxylation in the absence of the FIH/AR-interaction. 2) Skeleton Model 2 (SKM2) - FIG sequestration by ARD proteins and oxygen-dependent FIH-release. 3) Full Model (Fusion of SKM1 and SKM2) - the effects of the FIH/ARD proteins interaction on HIFα CAD-hydroxylation.
  // This model corresponds to the "Full Model" described in the paper. The model reproduces figure 5 of the publication.
  // This model originates from BioModels Database: A Database of Annotated Published Models (http://www.ebi.ac.uk/biomodels/). It is copyright (c) 2005-2011 The BioModels.net Team.
  // For more information see the terms of use.
  // To cite BioModels Database, please use: Li C, Donizelli M, Rodriguez N, Dharuri H, Endler L, Chelliah V, Li L, He E, Henry A, Stefan MI, Snoep JL, Hucka M, Le Novère N, Laibe C (2010) BioModels Database: An enhanced, curated and annotated resource for published quantitative kinetic models. BMC Syst Biol., 4:92.
  // biomodels.db:MODEL1008170000
  // biomodels.db:BIOMD0000000300
  // isDescribedBy pubmed:20955552
  // hasTaxon taxonomy:9606
  // isVersionOf GO:0070483 GO:0001666 GO:0070482
  // hasProperty mamo:MAMO_0000046

  // Compartments:
  compartment Cell = 1;  // isVersionOf GO:0005623

  // Species:
  species Htot in Cell = 0;  // hasPart uniprot:Q99814 uniprot:Q16665 uniprot:Q9Y2N7
  species H in Cell = 0;  // isVersionOf uniprot:Q99814 uniprot:Q16665 uniprot:Q9Y2N7
  species A in Cell = 100;  // isVersionOf uniprot:P16157
  species $HOH in Cell;  // isVersionOf uniprot:Q16665 uniprot:Q99814 uniprot:Q9Y2N7
  species $Atot in Cell = 100;  // isVersionOf uniprot:P16157
  species $AOH in Cell;  // isVersionOf uniprot:P16157
  species $Ftot in Cell = 1;  // isVersionOf uniprot:Q9NWT6
  species $Ptot in Cell = 0.2;  // isVersionOf uniprot:Q3T1B0 uniprot:Q9NTU9
  species $HF in Cell;
  species $HP in Cell;
  species $O2 in Cell = 0;  // isVersionOf CHEBI:15379
  species $FIHfree in Cell;
  species $CAD in Cell;
  species $NAD in Cell;
  species $CADOH in Cell;
  species $A_for_plotting in Cell;

  // Parameters:
  alpha = 0.33 dimensionless;
  KdFH = 1 dimensionless;
  KdFA = 1 dimensionless;
  KdPH = 1 dimensionless;
  KdHRE = 0.3 dimensionless;
  gamma = 0 dimensionless;
  kcatPH = 500 dimensionless;
  w = 1 dimensionless;
  eps = 5 dimensionless;
  kdeg_A has dimensionless;
  ksyn_A has dimensionless;
  KiFH has dimensionless;
  KiFA has dimensionless;
  kcatFH has dimensionless;
  kdeg_H = 1 dimensionless;
  ksyn_H = 1 dimensionless;

  // Assignment rules:
  HOH := Htot - H;
  AOH := Atot - A;
  HP := 0.5*(Htot - Ptot - KdPH + sqrt((KdPH - Htot + Ptot)^2 + 4*Htot*KdPH));
  CAD := H/(KdHRE + Htot);
  NAD := Htot/(KdHRE + Htot);
  A_for_plotting := A/Atot;
  CADOH := (Htot - H)/(KdHRE + Htot);
  kdeg_A := 1/eps;
  ksyn_A := Atot/eps;
  KiFH := KdFH/KdFA*(KdFA + A + gamma*(Atot - A));
  HF := 0.5*(H - Ftot - KiFH + sqrt((KiFH - H + Ftot)^2 + 4*H*KiFH));
  FIHfree := (KdFH + HF)/(KiFH + HF);
  KiFA := KdFA/KdFH*(KdFH + HF);
  kcatFH := kcatPH*w;

  // Reactions:
  Htot_synthesis: => Htot; Cell*Constant_flux_irreversible(ksyn_H);  // isVersionOf GO:0009058
  Htot_basal_degradation: Htot => ; Cell*kdeg_H*Htot;  // isVersionOf GO:0030163
  Htot_induced_degradation: Htot => ; Cell*vPH_Htot(kcatPH, Ptot, O2, KdPH, Htot, HP);  // modifiers: Ptot, O2, HP; isVersionOf GO:0030163
  H_synthesis: => H; Cell*Constant_flux_irreversible(ksyn_H);  // isVersionOf GO:0009058
  H_basal_degardation: H => ; Cell*kdeg_H*H;  // isVersionOf GO:0030163
  H_induced_degradation: H => ; Cell*vPH_H(H, kcatPH, Ptot, O2, KdPH, HP);  // modifiers: Ptot, O2, HP; isVersionOf GO:0030163
  H_hydroxylation: H => ; Cell*vFH(Ftot, O2, alpha, H, KiFH, HF, kcatFH);  // modifiers: Ftot, O2, HF; isVersionOf GO:0018126
  A_synthesis: => A; Cell*Constant_flux_irreversible(ksyn_A);  // isVersionOf GO:0009058
  A_degradation: A => ; Cell*kdeg_A*A;  // isVersionOf GO:0030163
  A_hydroxylation: A => ; Cell*vFA(Ftot, O2, alpha, A, gamma, Atot, KiFA, kcatFH);  // modifiers: Ftot, O2, Atot; isVersionOf GO:0018126

  // Unit definitions:
  unit volume = dimensionless;
  unit time = dimensionless;
  unit substance = dimensionless;
end
